@DSL       Implicit;
@Behaviour LinearElasticity;
@Author    Andrei Shvarts;
@Date      30/03/2023;

@Description{
  "Linear Elasticity"
}

@MaterialProperty stress young_modulus;
young_modulus.setGlossaryName("YoungModulus");
@MaterialProperty real poisson_ratio;
poisson_ratio.setGlossaryName("PoissonRatio");

@Brick "StandardElasticity"{
  young_modulus: young_modulus,
  poisson_ratio: poisson_ratio
};
