@DSL Implicit;

@Behaviour LogarithmicStrainPlasticity;
@Author Thomas Helfer/Jérémy Bleyer;
@Date 07 / 04 / 2020;

@StrainMeasure Hencky;

@Algorithm NewtonRaphson;
@Epsilon 1.e-14;
@Theta 1;

@MaterialProperty stress s0;
s0.setGlossaryName("YieldStress");
@MaterialProperty stress H0;
H0.setEntryName("HardeningSlope");

@Parameter s0     =  1.e9;
s0.setEntryName("YieldStress");
@Parameter H0     =  1.e9;
H0.setEntryName("HardeningSlope");

@Brick StandardElastoViscoPlasticity{
  stress_potential : "Hooke" {
	young_modulus : 210e9,
        poisson_ratio : 0.3
        },
  inelastic_flow : "Plastic" {
    criterion : "Mises",
    isotropic_hardening : "Linear" {H : "H0", R0 : "s0"}
  }
};
